** This is the original axial version - you will need to ensure the femur is not
** moved before running.
*Heading
 Addressed issue with element excessively deforming on meniscus and tested for higher stiffness case..
** Job name: TestJob-2 Model name: PCKnee5
** Generated by: Abaqus/CAE 2022
*Preprint, echo=NO, model=NO, history=NO, contact=NO
**
** PARTS
**
*Part, name=PCKnee5_Tibia#PART-1
*Node
      1,   45.8391495,   84.2912903,   18.8417835
      2,   45.4868698,   83.4911346,   19.2898388
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*Element, type=C3D4
    1,     1,     2,     3,     4
    2,     5,     6,     7,     8
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*Elset, elset=PT_TCART_LAT, generate
 14831,  23414,      1
*Elset, elset=PT_TCART_MED, generate
 23415,  31294,      1
*Elset, elset=PT_TIBIA, generate
     1,  14830,      1
** Section: Section-1-PT_TIBIA
*Solid Section, elset=PT_TIBIA, material=PCKnee5_Tibia#PM_TIBIA
,
** Section: Section-2-PT_TCART_LAT
*Solid Section, elset=PT_TCART_LAT, material=PCKnee5_Tibia#PM_TCART
,
** Section: Section-3-PT_TCART_MED
*Solid Section, elset=PT_TCART_MED, material=PCKnee5_Tibia#PM_TCART
,
*End Part
**
*Part, name=PCKnee5_Menisci#PART-1
*Node
      1,   20.9877644,   53.9602203,   33.1898003
      2,   21.5628166,   53.1473236,   32.5907593
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*Element, type=C3D4
    1,    1,    2,    3,    4
    2,    5,    6,    7,    8
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*Elset, elset=PT_LATERAL_MEN, generate
     1,  12964,      1
*Elset, elset=PT_MEDIAL_MEN, generate
 12965,  24316,      1
*Elset, elset=_LATSURF_S1, internal
    21,    70,   106,   109,   125,   137
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*Elset, elset=_LATSURF_S2, internal
     7,    17,    18,    38,    55,    61
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*Elset, elset=_LATSURF_S3, internal
     9,    52,    68,    85,    94,   128
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*Elset, elset=_LATSURF_S4, internal
    19,    58,    64,   134,   169,   178
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*Elset, elset=_MEDSURF_S1, internal
 13068, 13073, 13078, 13106, 13181, 13210
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*Elset, elset=_MEDSURF_S2, internal
 13009, 13039, 13043, 13133, 13141, 13163
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*Elset, elset=_MEDSURF_S3, internal
 13013, 13048, 13096, 13134, 13200, 13218
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*Elset, elset=_MEDSURF_S4, internal
 12986, 13012, 13017, 13033, 13054, 13085
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*Elset, elset=_LATSURF_S1, internal
    21,    70,   106,   109,   125,   137
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*Elset, elset=_LATSURF_S2, internal
     7,    17,    18,    38,    55,    61
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*Elset, elset=_LATSURF_S4, internal
    19,    58,    64,   134,   169,   178
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*Elset, elset=_LATSURF_S3, internal
     9,    52,    68,    85,    94,   128
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*Surface, type=ELEMENT, name=LATSURF
_LATSURF_S1, S1
_LATSURF_S2, S2
_LATSURF_S4, S4
_LATSURF_S3, S3
*Elset, elset=_MEDSURF_S1, internal
 13068, 13073, 13078, 13106, 13181, 13210
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*Elset, elset=_MEDSURF_S2, internal
 13009, 13039, 13043, 13133, 13141, 13163
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*Elset, elset=_MEDSURF_S4, internal
 12986, 13012, 13017, 13033, 13054, 13085
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*Elset, elset=_MEDSURF_S3, internal
 13013, 13048, 13096, 13134, 13200, 13218
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*Surface, type=ELEMENT, name=MEDSURF
_MEDSURF_S1, S1
_MEDSURF_S2, S2
_MEDSURF_S4, S4
_MEDSURF_S3, S3
*Orientation, name=Ori-PART-1_ORI-1-DISCORIENT, system=RECTANGULAR
PART-1_ORI-1-DISCORIENT
1, 0.
** Section: Section-1-PT_LATERAL_MEN
*Solid Section, elset=PT_LATERAL_MEN, orientation=Ori-PART-1_ORI-1-DISCORIENT, material=PCKnee5_Menisci#PM_MENISCAL_MEN
,
*Orientation, name=Ori-PART-1_ORI-2-DISCORIENT, system=RECTANGULAR
PART-1_ORI-2-DISCORIENT
1, 0.
** Section: Section-2-PT_MEDIAL_MEN
*Solid Section, elset=PT_MEDIAL_MEN, orientation=Ori-PART-1_ORI-2-DISCORIENT, material=PCKnee5_Menisci#PM_MENISCAL_MEN
,
*Distribution, name=PART-1_ORI-1-DISCORIENT, location=ELEMENT, Table=PCKnee5_Menisci#PART-1_ORI-1-DISCORIENT_Table
,           1.,           0.,           0.,           0.,           1.,           0.
1, -0.226772859692574, 0.791060924530029, -0.568151950836182, 0.293248653411865, 0.611737370491028, 0.734699010848999
2, -0.0307973902672529, 0.86182689666748, -0.506266713142395, 0.052330207079649, 0.507202506065369, 0.860236644744873
3, -0.870479166507721, 0.0103771947324276, -0.492095917463303, 0.00903361849486828, 0.999946236610413, 0.00510685052722692
4, -0.752409219741821, 0.253797709941864, -0.607838034629822, 0.197423949837685, 0.967257380485535, 0.159490048885345
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12964, -0.534476041793823, 0.666617870330811, 0.519572913646698, 0.47798690199852, 0.745399653911591, -0.464658915996552
*Distribution, name=PART-1_ORI-2-DISCORIENT, location=ELEMENT, Table=PCKnee5_Menisci#PART-1_ORI-2-DISCORIENT_Table
,           1.,           0.,           0.,           0.,           1.,           0.
12965, -0.0278539173305035, 0.824110090732574, -0.565744519233704, 0.0405252203345299, 0.566429793834686, 0.823113024234772
12966, -0.211934030056, -0.839047312736511, 0.501082360744476, -0.326844811439514, 0.544058382511139, 0.772769629955292
12967, -0.0623127855360508, 0.862415850162506, -0.502350568771362, 0.106162533164024, 0.50620049238205, 0.855856597423553
12968, 0.626627862453461, 0.522483587265015, -0.578228771686554, -0.383982867002487, 0.852649331092834, 0.35432505607605
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24316, -0.3457892537117, -0.211280435323715, 0.914215743541718, -0.07474584877491, 0.977425515651703, 0.197616994380951
*End Part
**
*Part, name=PCKnee5_Femur#PART-1
*Node
      1,   55.9549866,   32.3133011,   12.0677671
      2,   55.8656311,   33.5641251,   13.0931339
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*Element, type=C3D4
    1,    1,    2,    3,    4
    2,    5,    6,    7,    8
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*Elset, elset=PT_FCART, generate
     1,  17722,      1
*Elset, elset=PT_FEMUR, generate
 17723,  33516,      1
** Section: Section-2-PT_FCART
*Solid Section, elset=PT_FCART, material=PCKnee5_Femur#PM_FCART
,
** Section: Section-1-PT_FEMUR
*Solid Section, elset=PT_FEMUR, material=PCKnee5_Femur#PM_FEMUR
,
*End Part
**
**
** ASSEMBLY
**
*Assembly, name=Assembly
**
*Instance, name=PCKnee5_Tibia-1#PART-1-1, part=PCKnee5_Tibia#PART-1
          0.,           4.,           0.
*End Instance
**
*Instance, name=PCKnee5_Menisci-1#PART-1-1, part=PCKnee5_Menisci#PART-1
          0.,          2.5,           0.
*End Instance
**
*Instance, name=PCKnee5_Femur-1#PART-1-1, part=PCKnee5_Femur#PART-1
-0.00375770825026933, 0.0995406156197021, -0.00317472847596534
-0.00375770825026933, 0.0995406156197021, -0.00317472847596534, 0.994246089594448, 0.135584258471605, -0.0550324955528345, 0.1499480905077
*End Instance
**
*Node
      1,   50.2366676,   31.1933327,   48.6533318
*Node
      2,   40.2869148,   27.3556919,   48.5282135
*Node
      3,   40.4339981,   45.8544998,   47.1730003
*Node
      4,   35.4529991,   48.8289986,   47.7589989
*Node
      5,   45.4150009,   50.8800011,   46.5870018
*Node
      6,   60.0629997,   40.8069992,   31.2870007
*Node
      7,   9.68500042,   20.8040009,   47.4850006
*Node
      8,   66.8130035,   24.6450005,   58.3310013
*Nset, nset=Femur_CNode
 2,
*Nset, nset=PCKnee5_Femur-1#PLF1, instance=PCKnee5_Femur-1#PART-1-1
 7817,
*Nset, nset=PCKnee5_Femur-1#PLF2, instance=PCKnee5_Femur-1#PART-1-1
 7375,
*Nset, nset=PCKnee5_Femur-1#PLF3, instance=PCKnee5_Femur-1#PART-1-1
 7173,
*Nset, nset=PCKnee5_Femur-1#PLF4, instance=PCKnee5_Femur-1#PART-1-1
 8147,
*Nset, nset=PCKnee5_Femur-1#PLF5, instance=PCKnee5_Femur-1#PART-1-1
 7584,
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*Nset, nset=PCKnee5_Menisci-1#LatSurf, instance=PCKnee5_Menisci-1#PART-1-1
   10,   12,   14,   16,   18,   22
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*Nset, nset=PCKnee5_Tibia-1#LatEpiCondyle
 4,
*Nset, nset=PCKnee5_Tibia-1#MedEpiCondyle
 5,
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*Nset, nset=Tibia_CNode
 3,
*Elset, elset=_PCKnee5_Femur-1#SF_FCART_SELF_CONTACT_S1, internal, instance=PCKnee5_Femur-1#PART-1-1
     3,    12,    17,    22,    23,    24
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*Elset, elset=_PCKnee5_Femur-1#SF_FCART_SELF_CONTACT_S2, internal, instance=PCKnee5_Femur-1#PART-1-1
     2,    10,    29,    30,    38,    43
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*Elset, elset=_PCKnee5_Femur-1#SF_FCART_SELF_CONTACT_S3, internal, instance=PCKnee5_Femur-1#PART-1-1
     7,    14,    16,    21,    36,    39
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*Elset, elset=_PCKnee5_Femur-1#SF_FCART_SELF_CONTACT_S4, internal, instance=PCKnee5_Femur-1#PART-1-1
     4,     5,     9,    11,    13,    28
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*Surface, type=ELEMENT, name=PCKnee5_Femur-1#SF_FCART_SELF_CONTACT
_PCKnee5_Femur-1#SF_FCART_SELF_CONTACT_S1, S1
_PCKnee5_Femur-1#SF_FCART_SELF_CONTACT_S2, S2
_PCKnee5_Femur-1#SF_FCART_SELF_CONTACT_S4, S4
_PCKnee5_Femur-1#SF_FCART_SELF_CONTACT_S3, S3
*Elset, elset=_PCKnee5_Femur-1#SF_FEMUR_SELF_CONTACT_S1, internal, instance=PCKnee5_Femur-1#PART-1-1
    23,    47,    57,    67,    87,   164
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*Elset, elset=_PCKnee5_Femur-1#SF_FEMUR_SELF_CONTACT_S2, internal, instance=PCKnee5_Femur-1#PART-1-1
     2,    10,    30,    43,    96,   115
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*Elset, elset=_PCKnee5_Femur-1#SF_FEMUR_SELF_CONTACT_S3, internal, instance=PCKnee5_Femur-1#PART-1-1
    16,    46,    50,    88,   114,   119
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*Elset, elset=_PCKnee5_Femur-1#SF_FEMUR_SELF_CONTACT_S4, internal, instance=PCKnee5_Femur-1#PART-1-1
     4,     5,    28,    33,    41,    60
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*Surface, type=ELEMENT, name=PCKnee5_Femur-1#SF_FEMUR_SELF_CONTACT
_PCKnee5_Femur-1#SF_FEMUR_SELF_CONTACT_S1, S1
_PCKnee5_Femur-1#SF_FEMUR_SELF_CONTACT_S2, S2
_PCKnee5_Femur-1#SF_FEMUR_SELF_CONTACT_S4, S4
_PCKnee5_Femur-1#SF_FEMUR_SELF_CONTACT_S3, S3
*Elset, elset=_PCKnee5_Menisci-1#LatSurf_S1, internal, instance=PCKnee5_Menisci-1#PART-1-1
    21,    70,    77,   106,   109,   125
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*Elset, elset=_PCKnee5_Menisci-1#LatSurf_S2, internal, instance=PCKnee5_Menisci-1#PART-1-1
     7,    17,    18,    38,    55,    61
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*Elset, elset=_PCKnee5_Menisci-1#LatSurf_S3, internal, instance=PCKnee5_Menisci-1#PART-1-1
     9,    52,    68,    85,    94,   128
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*Elset, elset=_PCKnee5_Menisci-1#LatSurf_S4, internal, instance=PCKnee5_Menisci-1#PART-1-1
    19,    58,    64,   134,   178,   248
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*Surface, type=ELEMENT, name=PCKnee5_Menisci-1#LatSurf
_PCKnee5_Menisci-1#LatSurf_S1, S1
_PCKnee5_Menisci-1#LatSurf_S2, S2
_PCKnee5_Menisci-1#LatSurf_S4, S4
_PCKnee5_Menisci-1#LatSurf_S3, S3
*Elset, elset=_PCKnee5_Menisci-1#MedSurf_S1, internal, instance=PCKnee5_Menisci-1#PART-1-1
 13068, 13073, 13078, 13106, 13181, 13210
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*Elset, elset=_PCKnee5_Menisci-1#MedSurf_S2, internal, instance=PCKnee5_Menisci-1#PART-1-1
 13009, 13039, 13043, 13133, 13163, 13225
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*Elset, elset=_PCKnee5_Menisci-1#MedSurf_S3, internal, instance=PCKnee5_Menisci-1#PART-1-1
 13013, 13048, 13096, 13123, 13134, 13200
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*Elset, elset=_PCKnee5_Menisci-1#MedSurf_S4, internal, instance=PCKnee5_Menisci-1#PART-1-1
 12986, 13017, 13033, 13054, 13085, 13090
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*Surface, type=ELEMENT, name=PCKnee5_Menisci-1#MedSurf
_PCKnee5_Menisci-1#MedSurf_S1, S1
_PCKnee5_Menisci-1#MedSurf_S2, S2
_PCKnee5_Menisci-1#MedSurf_S4, S4
_PCKnee5_Menisci-1#MedSurf_S3, S3
*Elset, elset=_PCKnee5_Menisci-1#SF_LATERAL_MEN_SELF_CONTACT_S1, internal, instance=PCKnee5_Menisci-1#PART-1-1
     2,    21,    40,    51,    53,    70
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*Elset, elset=_PCKnee5_Menisci-1#SF_LATERAL_MEN_SELF_CONTACT_S2, internal, instance=PCKnee5_Menisci-1#PART-1-1
     7,    17,    18,    33,    38,    42
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*Elset, elset=_PCKnee5_Menisci-1#SF_LATERAL_MEN_SELF_CONTACT_S3, internal, instance=PCKnee5_Menisci-1#PART-1-1
     9,    34,    52,    68,    73,    85
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*Elset, elset=_PCKnee5_Menisci-1#SF_LATERAL_MEN_SELF_CONTACT_S4, internal, instance=PCKnee5_Menisci-1#PART-1-1
     1,    19,    56,    58,    64,    76
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*Surface, type=ELEMENT, name=PCKnee5_Menisci-1#SF_LATERAL_MEN_SELF_CONTACT
_PCKnee5_Menisci-1#SF_LATERAL_MEN_SELF_CONTACT_S1, S1
_PCKnee5_Menisci-1#SF_LATERAL_MEN_SELF_CONTACT_S2, S2
_PCKnee5_Menisci-1#SF_LATERAL_MEN_SELF_CONTACT_S4, S4
_PCKnee5_Menisci-1#SF_LATERAL_MEN_SELF_CONTACT_S3, S3
*Elset, elset=_PCKnee5_Menisci-1#SF_MEDIAL_MEN_SELF_CONTACT_S1, internal, instance=PCKnee5_Menisci-1#PART-1-1
 12991, 13000, 13003, 13028, 13042, 13050
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*Elset, elset=_PCKnee5_Menisci-1#SF_MEDIAL_MEN_SELF_CONTACT_S2, internal, instance=PCKnee5_Menisci-1#PART-1-1
 13009, 13016, 13019, 13031, 13039, 13043
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*Elset, elset=_PCKnee5_Menisci-1#SF_MEDIAL_MEN_SELF_CONTACT_S3, internal, instance=PCKnee5_Menisci-1#PART-1-1
 12965, 12967, 12968, 12972, 12995, 13013
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*Elset, elset=_PCKnee5_Menisci-1#SF_MEDIAL_MEN_SELF_CONTACT_S4, internal, instance=PCKnee5_Menisci-1#PART-1-1
 12974, 12978, 12982, 12986, 12989, 12997
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*Surface, type=ELEMENT, name=PCKnee5_Menisci-1#SF_MEDIAL_MEN_SELF_CONTACT
_PCKnee5_Menisci-1#SF_MEDIAL_MEN_SELF_CONTACT_S1, S1
_PCKnee5_Menisci-1#SF_MEDIAL_MEN_SELF_CONTACT_S2, S2
_PCKnee5_Menisci-1#SF_MEDIAL_MEN_SELF_CONTACT_S4, S4
_PCKnee5_Menisci-1#SF_MEDIAL_MEN_SELF_CONTACT_S3, S3
*Elset, elset=_PCKnee5_Tibia-1#SF_TCART_LAT_SELF_CONTACT_S1, internal, instance=PCKnee5_Tibia-1#PART-1-1
 14831, 14837, 14841, 14843, 14852, 14864
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*Elset, elset=_PCKnee5_Tibia-1#SF_TCART_LAT_SELF_CONTACT_S2, internal, instance=PCKnee5_Tibia-1#PART-1-1
 14834, 14871, 14893, 14896, 14903, 14908
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*Elset, elset=_PCKnee5_Tibia-1#SF_TCART_LAT_SELF_CONTACT_S3, internal, instance=PCKnee5_Tibia-1#PART-1-1
 14847, 14848, 14856, 14857, 14866, 14870
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*Elset, elset=_PCKnee5_Tibia-1#SF_TCART_LAT_SELF_CONTACT_S4, internal, instance=PCKnee5_Tibia-1#PART-1-1
 14838, 14844, 14855, 14865, 14877, 14880
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*Surface, type=ELEMENT, name=PCKnee5_Tibia-1#SF_TCART_LAT_SELF_CONTACT
_PCKnee5_Tibia-1#SF_TCART_LAT_SELF_CONTACT_S1, S1
_PCKnee5_Tibia-1#SF_TCART_LAT_SELF_CONTACT_S2, S2
_PCKnee5_Tibia-1#SF_TCART_LAT_SELF_CONTACT_S4, S4
_PCKnee5_Tibia-1#SF_TCART_LAT_SELF_CONTACT_S3, S3
*Elset, elset=_PCKnee5_Tibia-1#SF_TCART_MED_SELF_CONTACT_S1, internal, instance=PCKnee5_Tibia-1#PART-1-1
 23442, 23445, 23447, 23461, 23468, 23472
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*Elset, elset=_PCKnee5_Tibia-1#SF_TCART_MED_SELF_CONTACT_S2, internal, instance=PCKnee5_Tibia-1#PART-1-1
 23415, 23430, 23450, 23452, 23454, 23464
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*Elset, elset=_PCKnee5_Tibia-1#SF_TCART_MED_SELF_CONTACT_S3, internal, instance=PCKnee5_Tibia-1#PART-1-1
 23432, 23440, 23453, 23476, 23477, 23480
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*Elset, elset=_PCKnee5_Tibia-1#SF_TCART_MED_SELF_CONTACT_S4, internal, instance=PCKnee5_Tibia-1#PART-1-1
 23420, 23422, 23426, 23437, 23441, 23443
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*Surface, type=ELEMENT, name=PCKnee5_Tibia-1#SF_TCART_MED_SELF_CONTACT
_PCKnee5_Tibia-1#SF_TCART_MED_SELF_CONTACT_S1, S1
_PCKnee5_Tibia-1#SF_TCART_MED_SELF_CONTACT_S2, S2
_PCKnee5_Tibia-1#SF_TCART_MED_SELF_CONTACT_S4, S4
_PCKnee5_Tibia-1#SF_TCART_MED_SELF_CONTACT_S3, S3
*Elset, elset=_PCKnee5_Tibia-1#SF_TIBIA_SELF_CONTACT_S1, internal, instance=PCKnee5_Tibia-1#PART-1-1
    11,    15,    16,    25,    31,    37
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*Elset, elset=_PCKnee5_Tibia-1#SF_TIBIA_SELF_CONTACT_S2, internal, instance=PCKnee5_Tibia-1#PART-1-1
    14,    66,   101,   105,   121,   126
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*Elset, elset=_PCKnee5_Tibia-1#SF_TIBIA_SELF_CONTACT_S3, internal, instance=PCKnee5_Tibia-1#PART-1-1
     3,    19,    29,    34,    36,    42
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*Elset, elset=_PCKnee5_Tibia-1#SF_TIBIA_SELF_CONTACT_S4, internal, instance=PCKnee5_Tibia-1#PART-1-1
    72,    76,    85,    89,    95,   102
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*Surface, type=ELEMENT, name=PCKnee5_Tibia-1#SF_TIBIA_SELF_CONTACT
_PCKnee5_Tibia-1#SF_TIBIA_SELF_CONTACT_S1, S1
_PCKnee5_Tibia-1#SF_TIBIA_SELF_CONTACT_S2, S2
_PCKnee5_Tibia-1#SF_TIBIA_SELF_CONTACT_S4, S4
_PCKnee5_Tibia-1#SF_TIBIA_SELF_CONTACT_S3, S3
*Surface, type=NODE, name=PCKnee5_Tibia-1#LatEpiCondyle_CNS_, internal
PCKnee5_Tibia-1#LatEpiCondyle, 1.
*Surface, type=NODE, name=PCKnee5_Tibia-1#MedEpiCondyle_CNS_, internal
PCKnee5_Tibia-1#MedEpiCondyle, 1.
** Constraint: Fcart_Femur_Tie
*Tie, name=Fcart_Femur_Tie, adjust=no
PCKnee5_Femur-1#SF_FCART_SELF_CONTACT, PCKnee5_Femur-1#SF_FEMUR_SELF_CONTACT
** Constraint: Femur_RigBody
*Rigid Body, ref node=Femur_CNode, elset=PCKnee5_Femur-1#PART-1-1.PT_FEMUR
** Constraint: LatEpiCondyle
*Tie, name=LatEpiCondyle, adjust=no
PCKnee5_Tibia-1#LatEpiCondyle_CNS_, PCKnee5_Tibia-1#SF_TIBIA_SELF_CONTACT
** Constraint: Lat_Tibia_Tcart
*Tie, name=Lat_Tibia_Tcart, adjust=no
PCKnee5_Tibia-1#SF_TCART_LAT_SELF_CONTACT, PCKnee5_Tibia-1#SF_TIBIA_SELF_CONTACT
** Constraint: MedEpiCondyle
*Tie, name=MedEpiCondyle, adjust=no
PCKnee5_Tibia-1#MedEpiCondyle_CNS_, PCKnee5_Tibia-1#SF_TIBIA_SELF_CONTACT
** Constraint: Med_Tibia_Tcart
*Tie, name=Med_Tibia_Tcart, adjust=no
PCKnee5_Tibia-1#SF_TCART_MED_SELF_CONTACT, PCKnee5_Tibia-1#SF_TIBIA_SELF_CONTACT
** Constraint: Tibia_RigBody
*Rigid Body, ref node=Tibia_CNode, elset=PCKnee5_Tibia-1#PART-1-1.PT_TIBIA
*Spring, elset=SPRINGS-A-AMM-spring

15.7
*Element, type=SpringA, elset=SPRINGS-A-AMM-spring
1, PCKnee5_Tibia-1#PART-1-1.3402, PCKnee5_Menisci-1#PART-1-1.4775
2, PCKnee5_Menisci-1#PART-1-1.4834, PCKnee5_Tibia-1#PART-1-1.3400
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*Spring, elset=SPRINGS-B-PMM-spring

15.7
*Element, type=SpringA, elset=SPRINGS-B-PMM-spring
16, PCKnee5_Tibia-1#PART-1-1.4225, PCKnee5_Menisci-1#PART-1-1.4587
17, PCKnee5_Menisci-1#PART-1-1.5798, PCKnee5_Tibia-1#PART-1-1.3075
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*Spring, elset=SPRINGS-C-ALM-spring

15.7
*Element, type=SpringA, elset=SPRINGS-C-ALM-spring
30, PCKnee5_Menisci-1#PART-1-1.377, PCKnee5_Tibia-1#PART-1-1.1752
31, PCKnee5_Menisci-1#PART-1-1.296, PCKnee5_Tibia-1#PART-1-1.853
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*Spring, elset=SPRINGS-D-PLM-spring

15.7
*Element, type=SpringA, elset=SPRINGS-D-PLM-spring
45, PCKnee5_Femur-1#PART-1-1.7817, PCKnee5_Menisci-1#PART-1-1.2073
46, PCKnee5_Femur-1#PART-1-1.7375, PCKnee5_Menisci-1#PART-1-1.33
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*Spring, elset=Torsion-spring
5
5000.
*Element, type=Spring1, elset=Torsion-spring
60, 3
*End Assembly
**
** INTERACTION PROPERTIES
**
*Surface Interaction, name=IntProp-1
1.,
*Friction, slip tolerance=0.005
 0.1,
*Surface Behavior, pressure-overclosure=HARD
*Surface Interaction, name=IntProp-2
1.,
*Friction, slip tolerance=0.005
 0.15,
*Surface Behavior, penalty=NONLINEAR
**
** MATERIALS
**
*Material, name=PCKnee5_Tibia#PM_TCART
*Hyperelastic, neo hooke
 0.68, 0.12
*Material, name=PCKnee5_Tibia#PM_TIBIA
*Elastic
150000., 0.3
**
** MATERIALS
**
*Material, name=PCKnee5_Menisci#PM_MENISCAL_MEN
*Elastic, type=ENGINEERING CONSTANTS
3.54,     3.54,    235.9,    0.01,    0.01,    0.01, 1.75,     24.28
     24.28,
*Distribution Table, name=PCKnee5_Menisci#PART-1_ORI-1-DISCORIENT_Table
coord3d, coord3d
*Distribution Table, name=PCKnee5_Menisci#PART-1_ORI-2-DISCORIENT_Table
coord3d, coord3d
**
** MATERIALS
**
*Material, name=PCKnee5_Femur#PM_FCART
*Hyperelastic, neo hooke
 0.68, 0.15
*Material, name=PCKnee5_Femur#PM_FEMUR
*Elastic
150000., 0.3
**
** BOUNDARY CONDITIONS
**
** Name: Femur Type: Symmetry/Antisymmetry/Encastre
*Boundary
Femur_CNode, ENCASTRE
**
** INTERACTIONS
**
** Interaction: Int-1
*Contact Pair, interaction=IntProp-1, type=SURFACE TO SURFACE, adjust=0.0
PCKnee5_Tibia-1#SF_TCART_LAT_SELF_CONTACT, PCKnee5_Femur-1#SF_FCART_SELF_CONTACT
** Interaction: Int-2
*Contact Pair, interaction=IntProp-1, type=SURFACE TO SURFACE, adjust=0.0
PCKnee5_Tibia-1#SF_TCART_MED_SELF_CONTACT, PCKnee5_Femur-1#SF_FCART_SELF_CONTACT
** Interaction: Int-3
*Contact Pair, interaction=IntProp-2, type=SURFACE TO SURFACE, adjust=0.0
PCKnee5_Menisci-1#SF_LATERAL_MEN_SELF_CONTACT, PCKnee5_Femur-1#SF_FCART_SELF_CONTACT
** Interaction: Int-4
*Contact Pair, interaction=IntProp-2, type=SURFACE TO SURFACE, adjust=0.0
PCKnee5_Menisci-1#SF_MEDIAL_MEN_SELF_CONTACT, PCKnee5_Femur-1#SF_FCART_SELF_CONTACT
** Interaction: Int-5
*Contact Pair, interaction=IntProp-2, type=SURFACE TO SURFACE, adjust=0.0
PCKnee5_Menisci-1#SF_LATERAL_MEN_SELF_CONTACT, PCKnee5_Tibia-1#SF_TCART_LAT_SELF_CONTACT
** Interaction: Int-6
*Contact Pair, interaction=IntProp-2, type=SURFACE TO SURFACE, adjust=0.0
PCKnee5_Menisci-1#SF_MEDIAL_MEN_SELF_CONTACT, PCKnee5_Tibia-1#SF_TCART_MED_SELF_CONTACT
** ----------------------------------------------------------------
**
** STEP: Init_displacement
**
*Step, name=Init_displacement, nlgeom=YES, inc=500, unsymm=YES
*Static
0.1, 1., 1e-15, 1.
**
** BOUNDARY CONDITIONS
**
** Name: Tibia Type: Displacement/Rotation
*Boundary
Tibia_CNode, 1, 1
Tibia_CNode, 2, 2, -1.5
Tibia_CNode, 3, 3
Tibia_CNode, 4, 4
Tibia_CNode, 5, 5
Tibia_CNode, 6, 6
**
** OUTPUT REQUESTS
**
*Restart, write, frequency=0
**
** FIELD OUTPUT: F-Output-1
**
*Output, field, variable=PRESELECT
**
** FIELD OUTPUT: F-Output-4
**
*Output, field, frequency=99999
*Node Output, nset=PCKnee5_Tibia-1#LatEpiCondyle
U, UR, UT, V, VR, VT
**
** FIELD OUTPUT: F-Output-2
**
*Node Output, nset=PCKnee5_Menisci-1#LatSurf
U, UR, UT, V, VR, VT
**
** FIELD OUTPUT: F-Output-5
**
*Node Output, nset=PCKnee5_Tibia-1#MedEpiCondyle
U, UR, UT, V, VR, VT
**
** FIELD OUTPUT: F-Output-3
**
**
** HISTORY OUTPUT: H-Output-1
**
*Output, history, variable=PRESELECT
*End Step
** ----------------------------------------------------------------
**
** STEP: Move
**
*Step, name=Move, nlgeom=YES
*Static
1., 1., 1e-05, 1.
**
** BOUNDARY CONDITIONS
**
** Name: Femur Type: Symmetry/Antisymmetry/Encastre
*Boundary, op=NEW
Femur_CNode, ENCASTRE
** Name: Tibia Type: Displacement/Rotation
*Boundary, op=NEW
Tibia_CNode, 1, 1
Tibia_CNode, 3, 3
Tibia_CNode, 4, 4
Tibia_CNode, 6, 6
**
** LOADS
**
** Name: Load0   Type: Concentrated force
*Cload, op=NEW
Tibia_CNode, 2, -1.
**
** OUTPUT REQUESTS
**
*Restart, write, frequency=0
**
** FIELD OUTPUT: F-Output-1
**
*Output, field, variable=PRESELECT
**
** FIELD OUTPUT: F-Output-4
**
*Output, field, frequency=99999
*Node Output, nset=PCKnee5_Tibia-1#LatEpiCondyle
U, UR, UT, V, VR, VT
**
** FIELD OUTPUT: F-Output-2
**
*Node Output, nset=PCKnee5_Menisci-1#LatSurf
U, UR, UT, V, VR, VT
**
** FIELD OUTPUT: F-Output-5
**
*Node Output, nset=PCKnee5_Tibia-1#MedEpiCondyle
U, UR, UT, V, VR, VT
**
** FIELD OUTPUT: F-Output-3
**
**
** HISTORY OUTPUT: H-Output-1
**
*Output, history, variable=PRESELECT
*End Step
** ----------------------------------------------------------------
**
** STEP: Load1
**
*Step, name=Load1, nlgeom=YES, inc=500, unsymm=YES
*Static
0.0125, 1., 1e-15, 1.
**
** LOADS
**
** Name: Load0   Type: Concentrated force
*Cload, op=NEW
Tibia_CNode, 2, -1.
** Name: Load1   Type: Concentrated force
*Cload, op=NEW
Tibia_CNode, 2, -500.
**
** OUTPUT REQUESTS
**
*Restart, write, frequency=0
**
** FIELD OUTPUT: F-Output-1
**
*Output, field, variable=PRESELECT
**
** FIELD OUTPUT: F-Output-4
**
*Output, field, frequency=99999
*Node Output, nset=PCKnee5_Tibia-1#LatEpiCondyle
U, UR, UT, V, VR, VT
**
** FIELD OUTPUT: F-Output-2
**
*Node Output, nset=PCKnee5_Menisci-1#LatSurf
U, UR, UT, V, VR, VT
**
** FIELD OUTPUT: F-Output-5
**
*Node Output, nset=PCKnee5_Tibia-1#MedEpiCondyle
U, UR, UT, V, VR, VT
**
** FIELD OUTPUT: F-Output-3
**
**
** HISTORY OUTPUT: H-Output-1
**
*Output, history, variable=PRESELECT
*End Step
** ----------------------------------------------------------------
**
** STEP: Load2
**
*Step, name=Load2, nlgeom=YES, inc=500, unsymm=YES
*Static
0.125, 1., 1e-15, 1.
**
** LOADS
**
** Name: Load0   Type: Concentrated force
*Cload, op=NEW
Tibia_CNode, 2, -1.
** Name: Load1   Type: Concentrated force
*Cload, op=NEW
Tibia_CNode, 2, -500.
** Name: Load2   Type: Concentrated force
*Cload, op=NEW
Tibia_CNode, 2, -500.
**
** OUTPUT REQUESTS
**
*Restart, write, frequency=0
**
** FIELD OUTPUT: F-Output-1
**
*Output, field, variable=PRESELECT
**
** FIELD OUTPUT: F-Output-4
**
*Output, field, frequency=99999
*Node Output, nset=PCKnee5_Tibia-1#LatEpiCondyle
U, UR, UT, V, VR, VT
**
** FIELD OUTPUT: F-Output-2
**
*Node Output, nset=PCKnee5_Menisci-1#LatSurf
U, UR, UT, V, VR, VT
**
** FIELD OUTPUT: F-Output-5
**
*Node Output, nset=PCKnee5_Tibia-1#MedEpiCondyle
U, UR, UT, V, VR, VT
**
** FIELD OUTPUT: F-Output-3
**
**
** HISTORY OUTPUT: H-Output-1
**
*Output, history, variable=PRESELECT
*End Step
** ----------------------------------------------------------------
**
** STEP: Load3
**
*Step, name=Load3, nlgeom=YES, inc=500, unsymm=YES
*Static
0.125, 1., 1e-15, 1.
**
** LOADS
**
** Name: Load0   Type: Concentrated force
*Cload, op=NEW
Tibia_CNode, 2, -1.
** Name: Load1   Type: Concentrated force
*Cload, op=NEW
Tibia_CNode, 2, -500.
** Name: Load2   Type: Concentrated force
*Cload, op=NEW
Tibia_CNode, 2, -500.
** Name: Load3   Type: Concentrated force
*Cload, op=NEW
Tibia_CNode, 2, -500.
**
** OUTPUT REQUESTS
**
*Restart, write, frequency=0
**
** FIELD OUTPUT: F-Output-1
**
*Output, field, variable=PRESELECT
**
** FIELD OUTPUT: F-Output-4
**
*Output, field, frequency=99999
*Node Output, nset=PCKnee5_Tibia-1#LatEpiCondyle
U, UR, UT, V, VR, VT
**
** FIELD OUTPUT: F-Output-2
**
*Node Output, nset=PCKnee5_Menisci-1#LatSurf
U, UR, UT, V, VR, VT
**
** FIELD OUTPUT: F-Output-5
**
*Node Output, nset=PCKnee5_Tibia-1#MedEpiCondyle
U, UR, UT, V, VR, VT
**
** FIELD OUTPUT: F-Output-3
**
**
** HISTORY OUTPUT: H-Output-1
**
*Output, history, variable=PRESELECT
*End Step
